// COMSOL Multiphysics 6.1.0.357 model "PSi_paper_imbibition.mph"
// Outline of the model tree

Parameters
  depth = 5[mm]
  L_layer1 = 1.5[um]
  L_layer2 = 20[um]
  L_layer3 = 1.5[um]
  L_paper = 205[um]
  W_psi = 2[mm]
  W_p = 16[mm]
  Rdrop = W_psi/2
  Z_psi2 = L_layer3 + L_layer2*0.5
  Z_psi1 = L_layer3 + L_layer2 + L_layer1*0.5
  Channel = 3.0[mm]
  box = 8[mm]
  Per_psi = 1.2e-17
  Per_paper = 6.8e-13
  Por_psi13 = 0.65
  Por_psi2 = 0.6
  Por_paper = 0.7
  Por_box = 0.8
  Per_box = 1e-12
  Vdrop0 = 20[ul]
  rho_w = 1000[kg/m^3]
  Mw = 0.018[kg/mol]
  mol2m3 = Mw/rho_w
  dp_eps = 1[Pa]
  mu_w = 1e-3[Pa*s]
  s_feed = 0.99
  Pres = -1e5
  a_psi13 = 1.0[1/m]
  a_psi2 = 0.8[1/m]
  n_psi = 1.42
  l_psi = 1
  a_paper = 3.0[1/m]
  n_paper = 1.42
  l_paper = 1
  q_drop_loss = 4.4e-12 [m^3/s]
  q_evap_surface = 1e-6 [m/s]
  t_inc = 0[s]  // Estimate the incubation timing from pressure1 using V_in difference, and use pressure2 to get smooth BC change
  dt_switch = 20[s]  // Smoothing window for the BC switch

Functions
  step1: Step | location = 0.001; smooth = 0.001

Variables
  var1 "Variables 1"
    V_evap_drop = q_drop_loss * t
    V_drop_eff = max(Vdrop0 - V_evap_drop, 0)

Couplings
  intop1: Integration on boundaries 14

Geometry
  geom1 "Geometry 1" (3D, length unit µm)
    blk1: Block "Paper" | pos = {-(depth-W_psi)/2 + depth/2, -Channel/2, -L_paper}; size = {W_p, Channel, L_paper}
    cyl1: Cylinder "PSi1" | pos = {W_psi/2, 0, L_layer3+L_layer2}; r = W_psi/2; h = L_layer1
    cyl2: Cylinder "PSi2" | pos = {W_psi/2, 0, L_layer3}; r = W_psi/2; h = L_layer2
    cyl3: Cylinder "PSi3" | pos = {W_psi/2, 0, 0}; r = W_psi/2; h = L_layer3
    cyl4: Cylinder "PaperL" | pos = {W_psi/2, 0, -L_paper}; r = depth/2; h = L_paper
    cyl5: Cylinder "PaperR" | pos = {W_p+W_psi/2, 0, -L_paper}; r = depth/2+1[um]; h = L_paper
    blk2: Block "PaperAbsorb" | pos = {W_p+W_psi/2 -depth/2, -box/2, -L_paper*4}; size = {box, box, L_paper*3}
    uni1: Union | input = blk1, blk2, cyl1, cyl2, cyl3, cyl4, cyl5
    wp1: WorkPlane | quickplane = yz; quickx = (W_p+depth/2+(W_psi -depth))/2; unite = on
    fin: Finalize "Form Union"

Materials
  mat1: Common "Water, liquid" on all domains
    def "Basic"
      thermalexpansioncoefficient = alpha_p(T)
      bulkviscosity = muB(T)
      dynamicviscosity = eta(T)
      ratioofspecificheat = gamma_w(T)
      electricconductivity = 5.5e-6[S/m]
      heatcapacity = Cp(T)
      density = rho(T)
      thermalconductivity = k(T)
      soundspeed = cs(T)
      eta: Piecewise
        arg = T
        pieces = 
          {273.15, 413.15, 1.3799566804-0.021224019151*T^1+1.3604562827E-4*T^2-4.6454090319E-7*T^3+8.9042735735E-10*T^4-9.0790692686E-13*T^5+3.8457331488E-16*T^6}
          {413.15, 553.75, 0.00401235783-2.10746715E-5*T^1+3.85772275E-8*T^2-2.39730284E-11*T^3}
        argunit = K
        fununit = Pa*s
      Cp: Piecewise | arg = T; pieces = {273.15, 553.75, 12010.1471-80.4072879*T^1+0.309866854*T^2-5.38186884E-4*T^3+3.62536437E-7*T^4}; argunit = K; fununit = J/(kg*K)
      rho: Piecewise
        arg = T
        smooth = contd1
        pieces = 
          {273.15, 293.15, 6.3092789034e-05*T^3-0.0603676398829*T^2+18.9229382407066*T-950.704055329848}
          {293.15, 373.15, 1.0335053319e-05*T^3-0.0133950656345*T^2+4.96928883266*T+432.257114008512}
        argunit = K
        fununit = kg/m^3
      k: Piecewise | arg = T; pieces = {273.15, 553.75, -0.869083936+0.00894880345*T^1-1.58366345E-5*T^2+7.97543259E-9*T^3}; argunit = K; fununit = W/(m*K)
      cs: Interpolation | table = {{273, 1403}, {278, 1427}, {283, 1447}, {293, 1481}, {303, 1507}, {313, 1526}, {323, 1541}, {333, 1552}, {343, 1555}, {353, 1555}, {363, 1550}, {373, 1543}}; interp = piecewisecubic; fununit = m/s; argunit = K
      an1: Analytic | funcname = alpha_p; expr = -1/rho(T)*d(rho(T),T); args = T; fununit = 1/K; argunit = K
      an2: Analytic | funcname = gamma_w; expr = 1+(T/Cp(T))*(alpha_p(T)*cs(T))^2; args = T; fununit = 1; argunit = K
      an3: Analytic | funcname = muB; expr = 2.79*eta(T); args = T; fununit = Pa*s; argunit = K

Physics
  dl: PorousMediaFlowRichards "Richards' Equation" on all domains
    dependent variable p
    usporous1: UnsaturatedPorousMedium (default)
      fluid1: FluidPorousMedium "Fluid 1" (default) | fluid = dommat; fluidType = gasLiquid; gasConstantType = specificGC
      pm1: PorousMatrixPorousMedium "Porous Matrix 1" (default)
        chip = 1e-4[1/Pa]
        permeabilityModelType = permeability
        K = 2.94e-4[m/s]
        Ks = 2.94e-4[m/s]
        dp = 0.5[mm]
        cf = 0.55
        bk = 1e3[Pa]
        retentionModel = vanGenuchten
        alpha = 1[1/m]
        l = 0.5
        n = 2
        theta_l = dl.porous.pm.epsilon
        kappa_r = 1
    nf1: NoFlow (default)
    gr1: Gravity
    init1: init "Initial Values 1" (default) | p = Pres
    usporous2: UnsaturatedPorousMedium "PSi1" on domains 4
      fluid1: FluidPorousMedium "Fluid 1" (default) | chif_mat = incompressible
      pm1: PorousMatrixPorousMedium "Porous Matrix 1" (default)
        permeabilityModelType = permeability
        retentionModel = vanGenuchten
        theta_r = 0.01
        alpha = a_psi13
        l = l_psi
        n = n_psi
        theta_l = 0.01 + (Por_psi13 - 0.01)*Se_psi13
        Se = Se_psi13
        Cm = 0
        kappa_r = max(Se_psi13,1e-4)^0.5*(1-(1-max(min(Se_psi13,0.9999),1e-4)^(n_psi/(n_psi-1)))^(1-1/n_psi))^2
        epsilon_mat = userdef
        epsilon = Por_psi13
        kappas_mat = userdef
        kappas = diag{Per_psi, Per_psi, Per_psi*10}
    usporous3: UnsaturatedPorousMedium "PSi2" on domains 3
      fluid1: FluidPorousMedium "Fluid 1" (default) | chif_mat = incompressible
      pm1: PorousMatrixPorousMedium "Porous Matrix 1" (default)
        retentionModel = vanGenuchten
        theta_r = 0.01
        alpha = a_psi2
        l = l_psi
        n = n_psi
        theta_l = 0.01 + (Por_psi2 - 0.01)*Se_psi2
        Se = Se_psi2
        Cm = 0
        kappa_r = max(Se_psi2,1e-4)^0.5*(1-(1-max(min(Se_psi2,0.9999),1e-4)^(n_psi/(n_psi-1)))^(1-1/n_psi))^2
        epsilon_mat = userdef
        epsilon = Por_psi2
        kappas_mat = userdef
        kappas = diag{Per_psi, Per_psi, Per_psi*10}
    usporous4: UnsaturatedPorousMedium "PSi3" on domains 2
      fluid1: FluidPorousMedium "Fluid 1" (default) | chif_mat = incompressible
      pm1: PorousMatrixPorousMedium "Porous Matrix 1" (default)
        retentionModel = vanGenuchten
        theta_r = 0.01
        alpha = a_psi13
        l = l_psi
        n = n_psi
        theta_l = 0.01 + (Por_psi13 - 0.01)*Se_psi13
        Se = Se_psi13
        Cm = 0
        kappa_r = max(Se_psi13,1e-4)^0.5*(1-(1-max(min(Se_psi13,0.9999),1e-4)^(n_psi/(n_psi-1)))^(1-1/n_psi))^2
        epsilon_mat = userdef
        epsilon = Por_psi13
        kappas_mat = userdef
        kappas = diag{Per_psi, Per_psi, Per_psi*10}
    usporous5: UnsaturatedPorousMedium "Paper" on domains 1, 5-7, 9
      fluid1: FluidPorousMedium "Fluid 1" (default) | chif_mat = incompressible
      pm1: PorousMatrixPorousMedium "Porous Matrix 1" (default)
        retentionModel = vanGenuchten
        theta_r = 0.05
        alpha = a_paper
        l = l_paper
        n = n_paper
        theta_l = 0.05 + (Por_paper - 0.05)*Se_paper
        Se = Se_paper
        Cm = 0
        kappa_r = max(Se_paper,1e-4)^0.5*(1-(1-max(min(Se_paper,0.9999),1e-4)^(n_paper/(n_paper-1)))^(1-1/n_paper))^2
        epsilon_mat = userdef
        epsilon = Por_paper
        kappas_mat = userdef
        kappas = Per_paper
    pr1: Pressure on boundaries 14 | p0 = Pres * step1((V_in - V_drop_eff)/(0.1*Vdrop0)) - dp_eps
    usporous7: UnsaturatedPorousMedium "Paper Box" on domains 8
      fluid1: FluidPorousMedium "Fluid 1" (default) | chif_mat = incompressible
      pm1: PorousMatrixPorousMedium "Porous Matrix 1" (default)
        retentionModel = vanGenuchten
        theta_r = 0.05
        alpha = a_paper
        l = l_paper
        n = n_paper
        theta_l = 0.05 + (Por_paper - 0.05)*Se_paper
        Se = Se_paper
        Cm = 0
        kappa_r = max(Se_paper,1e-4)^0.5*(1-(1-max(min(Se_paper,0.9999),1e-4)^(n_paper/(n_paper-1)))^(1-1/n_paper))^2
        epsilon_mat = userdef
        epsilon = Por_box
        kappas_mat = userdef
        kappas = Per_box
    pr2: Pressure (disabled) on boundaries 14 | p0 = Pres * 0.5 * (1 + tanh((t - t_inc)/dt_switch)) - dp_eps
  V_in: GlobalEquations "Global ODEs and DAEs"
    EquationForm.form = Automatic
    ge1: GlobalEquations
      name = V_in
      equation = V_int - intop1(-dl.w)
      valueType = complex
      DependentVariableQuantity = volume
      CustomDependentVariableUnit = m
      SourceTermQuantity = volumepertime
      CustomSourceTermUnit = m

Mesh
  mesh1 "Mesh 1"
    size: MeshSizeDefault | hmax = 1320; hmin = 96; hcurve = 0.4; hnarrow = 0.7; hgrad = 1.4; hauto = 3
    ftet1: FreeTet "Free Tetrahedral 1" on remaining entities | optcurved = on

Studies
  std1 "Study 1"
    param: Parametric "Parametric Sweep" | pname = Channel; plistarr = 3; punit = mm
    time: Transient "Time Dependent" | tlist = range(0,10,2500)

Solver configurations
  sol1 "Solution 1" (study std1)
    v1: Variables "Dependent Variables 1"
    t1: Time "Time-Dependent Solver 1"
      tlist = range(0,1,50) range(50,5,200) range(200,20,2000)
      rtol = 0.005
      initialstepbdf = 1e-4
      maxstepconstraintbdf = const
      maxstepbdf = 2
      maxorder = 2
      stabcntrl = on
      fc1: FullyCoupled | linsolver = i1; jtech = onevery; stabacc = aacc; aaccdim = 5; aaccmix = 0.9; aaccdelay = 1
      i1: Iterative "AMG, pressure (dl)" | maxlinit = 50
        mg1: Multigrid | prefun = saamg; maxcoarsedof = 50000
  sol2 "Parametric Solutions 1" (study std1)

Datasets
  dset1: Solution | solution = sol1
  dset2: Solution | solution = sol2
  cpl1: CutPlane | data = dset1; quickx = (W_p+depth/2+(W_psi -depth))/2

Derived values
  av1: AvVolume "Volume Average 1" on domains 4
    data = dset2
    table = new
    expr = dl.Se
    unit = 1
    descr = Effective saturation
  gev1: EvalGlobal "Global Evaluation 1" | data = dset1; table = new; expr = Vdrop0-V_in
  gev2: EvalGlobal "Global Evaluation 2" | data = dset2; expr = V_in; descr = State variable V_in
  av2: AvSurface "Surface Average 2" | data = dset1; expr = dl.U
  int1: IntSurface "Surface Integration 1" | data = cpl1; table = new; expr = dl.U

Plots
  pg1: PlotGroup3D "Velocity (dl)" | data = dset1
    str1: Streamline on boundaries 1-56 | expr = {dl.u, dl.v, dl.w}; pointtype = arrow; arrowlength = logarithmic
      col1: Color "Color Expression 1" | expr = dl.U
  pg2: PlotGroup3D "Pressure (dl)" | data = dset1
    surf1: Surface | expr = p
  pg3: PlotGroup3D "3D Plot Group 3" | data = dset2
    surf1: Surface (disabled) | expr = dl.Se; descr = Effective saturation
    slc1: Slice | expr = dl.Se; unit = ppm; quickplane = zx
  pg4: PlotGroup1D "1D Plot Group 4" | data = dset1
  pg5: PlotGroup1D "1D Plot Group 5" | data = dset1
    glob1: Global | data = dset2; expr = V_in
    glob2: Global | expr = V_drop_eff
  pg6: PlotGroup3D "Velocity (dl) 1" | data = dset2
    str1: Streamline on boundaries 1-56 | expr = {dl.u, dl.v, dl.w}; pointtype = arrow; arrowlength = logarithmic
      col1: Color "Color Expression 1" | expr = dl.U
  pg7: PlotGroup3D "Pressure (dl) 1" | data = dset2
    surf1: Surface | expr = p
  pg8: PlotGroup1D "1D Plot Group 8" | data = dset2